<?xml version="1.0"?>
<!--
  Textron-Lycoming IO-360-C1G6 for JSBSim

    Copyright (C) 2004 - 2009  JSBSim
    Copyright (C) 2009  Anders Gidenstam  (anders(at)gidenstam.org)
    This file is licensed under the GPL license version 2 or later.
-->
<piston_engine name="IO-360-C1G6">
  <displacement unit="IN3"> 361.00 </displacement>
  <bore unit="IN">           5.125 </bore>
  <stroke unit="IN">         4.375 </stroke>
  <compression-ratio>         8.70 </compression-ratio>
  <cylinders>                 4.00 </cylinders>
  <cycles>                    4.00 </cycles>

  <maxhp>                   180.0  </maxhp>
  <!--bsfc>                      0.37 </bsfc-->
  <idlerpm>                 550.0  </idlerpm>
  <maxrpm>                 2700.0  </maxrpm>

  <sparkfaildrop>             0.1 </sparkfaildrop>

  <minmp unit="INHG">         6.5 </minmp>	<!-- Deprecated -->
  <maxmp unit="INHG">        28.5 </maxmp>
  <maxthrottle>               1.0  </maxthrottle>
  <minthrottle>               0.1  </minthrottle>
</piston_engine>
