<?xml version="1.0"?>
<!-- $Id$ -->
<!--

  Zeppelin NT-07 airship flight model for JSBSim.

    Copyright (C) 2008 - 2009  Anders Gidenstam  (anders(at)gidenstam.org)

    This program is free software; you can redistribute it and/or modify
    it under the terms of the GNU General Public License as published by
    the Free Software Foundation; either version 2 of the License, or
    (at your option) any later version.

    This program is distributed in the hope that it will be useful,
    but WITHOUT ANY WARRANTY; without even the implied warranty of
    MERCHANTABILITY or FITNESS FOR A PARTICULAR PURPOSE.  See the
    GNU General Public License for more details.

    You should have received a copy of the GNU General Public License
    along with this program; if not, write to the Free Software
    Foundation, Inc., 59 Temple Place, Suite 330, Boston, MA  02111-1307  USA

-->
<?xml-stylesheet type="text/xsl" href="http://jsbsim.sourceforge.net/JSBSim.xsl"?>
<fdm_config name="NT07" version="2.0" release="ALPHA"
 xmlns:xsi="http://www.w3.org/2001/XMLSchema-instance"
 xsi:noNamespaceSchemaLocation="http://jsbsim.sourceforge.net/JSBSim.xsd">

 <fileheader>

  <author>Anders Gidenstam</author>
  <email>anders at gidenstam dot org</email>

  <filecreationdate>2008-06-10</filecreationdate>
  <version>$Id$</version>

  <description>JSBSim model of a Zeppelin NT-07 airship.</description>

  <license>
   <licenseName>GPL</licenseName>
   <licenseURL>http://www.gnu.org/licenses/gpl.html</licenseURL>
  </license>
  <note>
   This model was created using publicly available data, publicly available
   technical reports, textbooks, and guesses. It contains no proprietary or
   restricted data. It has been validated only to the extent that it may seem
   to "fly right", and possibly to comply to published, publicly known,
   performance data (maximum speed, endurance, etc.).

   This model is distributed in the hope that it will be useful,
   but WITHOUT ANY WARRANTY; without even the implied warranty of
   MERCHANTABILITY or FITNESS FOR A PARTICULAR PURPOSE.  See the
   GNU General Public License for more details.
  </note>

  <reference
   refID="FAA:2008:AS1CE"
   author="FAA"
   title="http://www.airweb.faa.gov/Regulatory_and_Guidance_Library/rgMakeModel.nsf/MainFrame?OpenFrameSet"
   date="11 June 2008"/>

  <reference
   refID="EASA:2008:TC_LZ_N07"
   author="EASA"
   title="http://www.easa.europa.eu/ws_prod/c/doc/Design_Appro/Airships/TCDS%20EASA_AS_001%20Issue%2003.pdf"
   date="17 June 2008"/>

  <reference
   refID="FAA:2008:E8-6600"
   author="FAA"
   title="http://edocket.access.gpo.gov/2008/pdf/E8-6600.pdf"
   date="28 March 2008"/>

 </fileheader>

 <!--
 ==== Metrics ===============================================================
 -->

 <metrics>

  <documentation>
   NOTE: The center of the mooring coupler at bow of the hull is the
         origo of the body coordinate system.
         x/y/z = back/right/up

   According to [FAA:2008:AS1CE] the datum of the ZLT Construction
   Coordinate System is 5.000 m ahead of the nose of the ship with the
   horizontal reference line running parallel to the airship center line.
  </documentation>

  <documentation>
   Some general data from http://www.zeppelinflug.de/seiten/D/zeppnt_techn.htm
   Note: My 2 view drawing is of a smaller NT-01 (6.5m shorter).
         It looks like these 6.5 meters were added in the center section
         aft of the car and engines. I'll add 6.5 meters to the aft locations.

   Zeppelin LZ N07
     Luftschiff neuer Technologie
     Erstflug:             18.September 1997
     Triebwerke:           Lycoming IO-360 mit je 147kw/200PS
     L\"ange:              75 m
     Max. Breite:          19,5 m
     H\"ohe:               17,4 m
     H\"ullenvolumen:      8.425 m3
     Max. Startgewicht:    8.040 kg
     Zuladung:             1.900 kg
     Max. Geschwindigkeit: 125 km/h
     Max. Flugh\"he:       2.600 m
     Max. Flugdauer:       ca. 24h
     Reichweite:           900 km

   [De Beers ppt]:
     Height:                17.4m
     Total ballonet volume: 2200m3
     Cabin length:          10.7m

   [wikipedia]:
     Total volume of the ballonets: 2,000m^3
     Normal pressure: 5 millibar.

   [Zeppelin-NT_Measurement_Platform.pdf]:
     Each engine has is own tank.
     Gondola plan!
     Max fuel load:              ~825kg
     Cruise consumption (70kph): 50kg/h
     110kph:                     100kg/h
     Max gondola payload:        1400kg
     3 generators (2x130A 28VDC, 1x10kW 100-200VAC -> 300A 28VDC)
     Max flight need:            340A (All blowers at max)
     Side engines:               90 deg up to 30 deg down.
                                 (Other sources: 0 - 120 up swivel)
     Aft engine:                 0 - 90 deg down.
     Load and buoyancy tables.

   [AIRSHIP_DEVELOPMENTS_WORLDWIDE.doc, 2001]:
     The prototype lengthened 6.5m to 75m.

   [PV2007_7879.pdf]
     Propeller diameter 2700mm.
  </documentation>

  <wingarea unit="M2"> 1000.0 </wingarea>  <!-- Planfold area (approximated).-->
  <wingspan unit="M">   14.1  </wingspan>  <!-- Envelope diameter. -->
  <chord unit="M">      75.0  </chord>     <!-- Envelope length. -->
  <htailarea unit="M2"> 25.2700 </htailarea> <!-- FIX these... -->
  <htailarm unit="M">   12.1500 </htailarm> <!-- From CG. -->
  <vtailarea unit="M2"> 12.6400 </vtailarea>
  <vtailarm unit="M">   12.1500 </vtailarm> <!-- From CG. -->
  <!-- Total envelope volume vol = 8.425 m^3 (NT07) -->

  <!-- Aerodynamic Reference Point. -->
  <location name="AERORP" unit="M">
   <x> 34.3 </x>
   <y>  0.0 </y>
   <z>  0.0 </z>
  </location>

  <location name="EYEPOINT" unit="M">
   <x> 18.9 </x>
   <y>  0.0 </y>
   <z> -7.8 </z>
  </location>

  <!-- Visual Reference Point -->
  <location name="VRP" unit="M">
   <x>  0.0  </x>
   <y>  0.0  </y>
   <z>  0.0  </z>
  </location>

 </metrics>

 <!--
 ==== Mass balance =========================================================
 -->

 <mass_balance>

  <documentation>
   Maximum weights according to [FAA:2008:AS1CE] and [EASA:2008:TC_LZ_N07]:
     Maximum airship equilibrium (normal condition) weight 16,865 lbs (7650 kg)
     Maximum car (gondola) gross weight                     5,390 lbs (2690 kg)
     Maximum static heaviness
       In Flight                                            1,102 lbs (500 kg)
       Take off and landing                                   882 lbs (400 kg)
       Maximum static lightness                              -441 lbs (-200 kg)
  </documentation>
  <documentation>
   C.G. Range according to [FAA:2008:AS1CE]:
     Take off and Landing
       Maximum Forward         39.150 m (1344.5 GE /fdm/jsbsim/inertia/cg-x-in)
       Maximum Aft             39.900 m (/fdm/jsbsim/inertia/cg-x-in LT 1374.0)
     In Flight
       Maximum Forward         38.400 m
       Maximum Aft             39.900 m
   Note: C.G locations in the Construction Coordinate System with reference
         datum 5.000 m ahead of the nose of the ship.
  </documentation>

  <emptywt unit="KG"> 1500 </emptywt>

  <documentation>
   The empty weight is estimated to consist of:
    - The weight of the envelope and frame, guesstimated to 1500 kg.
    - The frame weighs ~1000kg.

   The car and engines etc will be added as point masses.
  </documentation>

  <documentation>
   % Very rough estimation model of the empty weight CG and inertia tensor.
   % Assume the empty weight of is to 100% a cylindrical shell.

   m = 1500.0   % KG
   r = 7.05     % meter
   l = 75.0     % meter

   % Very rough estimate of center of gravity (based on the inertial estimate):
   CGx = 0
   CGy = 0
   CGz = 0

   % Steiners theorem:
   % Ixx = \bar{Ixx} + m sqrt(\bar{y}^2 + \bar{z}^2)
   % Ixy = \bar{Ixy} + m \bar{x} \bar{y}

   % Very rough estimation model of Ixx, Iyy and Izz relative the CG.
   Ixx = m * r^2

   Iyy = 1/2*m * r^2 + 1/12*m*l^2

   Izz = 1/2*m * r^2 + 1/12*m*l^2

   Ixy = 0
   Ixz = 0
   Iyz = 0

  </documentation>

  <ixx unit="KG*M2">  74554.0 </ixx>
  <iyy unit="KG*M2"> 740400.0 </iyy>
  <izz unit="KG*M2"> 740400.0 </izz>
  <ixy unit="KG*M2">      0.0 </ixy>
  <ixz unit="KG*M2">      0.0 </ixz>
  <iyz unit="KG*M2">      0.0 </iyz>

  <location name="CG" unit="M">
   <x> 37.500 </x>
   <y>  0.000 </y>
   <z>  0.000 </z>
  </location>

  <!--
  === Ballast ================================================
  -->
  <documentation>
   Ballast according to [FAA:2008:AS1CE]:
     In Flight:
       1543 lbs (700 kg) of water at 25.6 m
       441 lbs (200 kg) at 26.9 m. (Gondola locker aft)
     Ground:
       1543 lbs (700 kg) of water at 25.6 m
       441 lbs (200 kg) at 24.1 m. (Gondola locker forward)
       661 lbs (300 kg) at 26.9 m. (Gondola locker aft)
       397 lbs (180 kg) at 63.2 m. (Landing gear aft)
  </documentation>

  <!-- Experimental ballast setup. -->
  <!-- Center initial weigh-off ballast n=0 -->
  <pointmass name="Ballast_Center">
   <location unit="M">
    <x>  37.5 </x>
    <y>   0.0 </y>
    <z> -8.70 </z>
   </location>
   <weight unit="KG"> 2000 </weight>
  </pointmass>

  <!--
       Ballast tanks for fine tuning the CG.
       These are controlled by the FCS.
  -->
  <!-- Forward ballast n=1 -->
  <pointmass name="Ballast_Forward">
   <location unit="M">
    <x> 0.0 </x>
    <y> 0.0 </y>
    <z> -1.0 </z>
   </location>
   <weight unit="LBS"> 500 </weight>
  </pointmass>
  <!-- Aft ballast n=2 -->
  <pointmass type="Ballast_Aft">
   <location unit="M">
    <x> 75.0 </x>
    <y>  0.0 </y>
    <z> -1.0 </z>
   </location>
   <weight unit="LBS"> 500 </weight>
  </pointmass>

  <!--
  === Crew and payload =======================================
  -->
  <documentation>
   Payload according to [EASA:2008:TC_LZ_N07]:
     Max gondola payload: 1,040 kg
  </documentation>
  <documentation>
   Seats according to [FAA:2008:AS1CE]:
     2 (flight deck) at gondola station 22.38 m
     1 passenger LH  at gondola station 23.31 m
     1 passenger LH  at gondola station 24.49 m
     1 passenger LH  at gondola station 25.31 m
     1 passenger LH  at gondola station 26.12 m
     1 passenger LH  at gondola station 26.93 m
     1 passenger LH  at gondola station 27.75 m
     1 passenger RH  at gondola station 23.31 m
     1 passenger RH  at gondola station 24.72 m
     1 passenger RH  at gondola station 25.49 m
     1 passenger RH  at gondola station 26.25 m
     1 passenger RH  at gondola station 27.00 m
     1 passenger RH  at gondola station 27.77 m
     1 passenger RH  at gondola station 28.53 m
  </documentation>
  <pointmass name="Pilot"> <!-- n=3 -->
   <weight unit="KG"> 85.0 </weight>
   <location name="POINTMASS" unit="M">
    <x> 17.38 </x>
    <y> -0.45 </y>
    <z> -8.25 </z>
   </location>
  </pointmass>
  <pointmass name="Pilot"> <!-- n=4 -->
   <weight unit="KG"> 85.0 </weight>
   <location name="POINTMASS" unit="M">
    <x> 17.38 </x>
    <y>  0.45 </y>
    <z> -8.25 </z>
   </location>
  </pointmass>
  <pointmass name="Cabin payload"> <!-- n=5 -->
   <weight unit="KG"> 500.0 </weight>
   <location name="POINTMASS" unit="M">
    <x> 21.0 </x>
    <y>  0.0 </y>
    <z> -8.5 </z>
   </location>
  </pointmass>

  <!--
  === Engines ================================================
  -->
  <!-- IO360: dry weight ~130kg. -->
  <pointmass name="Left_Engine">
   <weight unit="KG"> 250.0 </weight>
   <location name="POINTMASS" unit="M">
    <x> 26.4 </x>
    <y> -6.6 </y>
    <z> -3.4 </z>
   </location>
  </pointmass>
  <pointmass name="Right_Engine">
   <weight unit="KG"> 250.0 </weight>
   <location name="POINTMASS" unit="M">
    <x> 26.4 </x>
    <y>  6.6 </y>
    <z> -3.4 </z>
   </location>
  </pointmass>
  <pointmass name="Aft_Engine">
   <weight unit="KG"> 250.0 </weight>
   <location name="POINTMASS" unit="M">
    <x> 73.0 </x>
    <y>  0.0 </y>
    <z>  0.0 </z>
   </location>
  </pointmass>

  <!--
  === Structure ==============================================
  -->

  <pointmass name="Mooring cone">
   <!-- Pure guess. -->
   <weight unit="KG"> 60.0 </weight>
   <location name="POINTMASS" unit="M">
    <x>  0.0 </x>
    <y>  0.0 </y>
    <z>  0.0 </z>
   </location>
  </pointmass>
  <pointmass name="Car">
   <!-- Pure guess. -->
   <weight unit="KG"> 1650.0 </weight>
   <location name="POINTMASS" unit="M">
    <x> 22.0 </x>
    <y>  0.0 </y>
    <z> -8.7 </z>
   </location>
  </pointmass>
  <pointmass name="Upper_fin">
   <!-- Pure guess. -->
   <weight unit="KG"> 180.0 </weight>
   <location name="POINTMASS" unit="M">
    <x> 63.2 </x>
    <y>  0.0 </y>
    <z>  5.0 </z>
   </location>
  </pointmass>
  <pointmass name="Left_fin">
   <!-- Pure guess. -->
   <weight unit="KG"> 180.0 </weight>
   <location name="POINTMASS" unit="M">
    <x> 63.2 </x>
    <y> -4.5 </y>
    <z> -2.1 </z>
   </location>
  </pointmass>
  <pointmass name="Right_fin">
   <!-- Pure guess. -->
   <weight unit="KG"> 180.0 </weight>
   <location name="POINTMASS" unit="M">
    <x> 63.2 </x>
    <y>  4.5 </y>
    <z> -2.1 </z>
   </location>
  </pointmass>

 </mass_balance>

 <!--
 ==== Ground reactions ======================================================
 -->

 <ground_reactions>

  <!--
  === Landing gears ===================================================
  -->
  <contact type="BOGEY" name="CAR_GEAR">
   <location unit="M">
    <x>  20.00 </x>
    <y>   0.00 </y>
    <z> -10.45 </z>
   </location>
   <static_friction>  0.8 </static_friction>
   <dynamic_friction> 0.5 </dynamic_friction>
   <rolling_friction> 0.2 </rolling_friction>
   <spring_coeff unit="N/M"> 50000 </spring_coeff>
   <damping_coeff unit="N/M/SEC"> 10000 </damping_coeff>
   <max_steer unit="DEG"> 0.0 </max_steer>
   <brake_group> LEFT </brake_group>
   <retractable>0</retractable>
  </contact>

  <contact type="BOGEY" name="REAR_GEAR">
   <location unit="M">
    <x>  59.00 </x>
    <y>   0.00 </y>
    <z>  -7.65 </z>
   </location>
   <static_friction>  0.8 </static_friction>
   <dynamic_friction> 0.5 </dynamic_friction>
   <rolling_friction> 0.2 </rolling_friction>
   <spring_coeff unit="N/M"> 50000 </spring_coeff>
   <damping_coeff unit="N/M/SEC"> 10000 </damping_coeff>
   <max_steer unit="DEG"> 0.0 </max_steer>
   <brake_group> RIGHT </brake_group>
   <retractable>0</retractable>
  </contact>

  <!--
  === Other contact points ============================================
  -->
  <!-- These should induce structural failure. -->
  <contact type="STRUCTURE" name="NOSE">
   <location unit="M">
    <x> 0.0 </x>
    <y> 0.0 </y>
    <z> 0.0 </z>
   </location>
   <static_friction>  0.2 </static_friction>
   <dynamic_friction> 0.2 </dynamic_friction>
   <spring_coeff unit="N/M">      100000 </spring_coeff>
   <damping_coeff unit="N/M/SEC">  20000 </damping_coeff>
  </contact>

  <contact type="STRUCTURE" name="LEFT_FIN">
   <location unit="M">
    <x> 57.3 </x>
    <y> -8.1 </y>
    <z> -4.1 </z>
   </location>
   <static_friction>  0.2 </static_friction>
   <dynamic_friction> 0.2 </dynamic_friction>
   <spring_coeff unit="N/M">      100000 </spring_coeff>
   <damping_coeff unit="N/M/SEC">  20000 </damping_coeff>
  </contact>

  <contact type="STRUCTURE" name="RIGHT_FIN">
   <location unit="M">
    <x> 57.3 </x>
    <y>  8.1 </y>
    <z> -4.1 </z>
   </location>
   <static_friction>  0.2 </static_friction>
   <dynamic_friction> 0.2 </dynamic_friction>
   <spring_coeff unit="N/M">      100000 </spring_coeff>
   <damping_coeff unit="N/M/SEC">  20000 </damping_coeff>
  </contact>

  <contact type="STRUCTURE" name="TAIL_ENGINE">
   <location unit="M">
    <x> 70.0 </x>
    <y>  0.0 </y>
    <z>  0.0 </z>
   </location>
   <static_friction>  0.2 </static_friction>
   <dynamic_friction> 0.2 </dynamic_friction>
   <spring_coeff unit="N/M">      100000 </spring_coeff>
   <damping_coeff unit="N/M/SEC">  20000 </damping_coeff>
  </contact>

 </ground_reactions>

 <!--
 ==== Propulsion ============================================================
 -->

 <propulsion>

  <!--
  === Engine ================================================
  -->
  <!-- Left engine -->
  <engine file="engIO360C">
   <location unit="M">
    <x> 26.4 </x>
    <y> -6.6 </y>
    <z> -3.4 </z>
   </location>
   <orient unit="DEG">
    <roll>  0.0 </roll>
    <pitch> 0.0 </pitch>
    <yaw>   0.0 </yaw>
   </orient>
   <feed>0</feed>
   <thruster file="propHO-V373-D">
    <location unit="M">
     <x> 25.5 </x>
     <y> -8.6 </y>
     <z> -3.5 </z>
    </location>
    <orient unit="DEG">
     <roll>  0.0 </roll>
     <pitch> 0.0 </pitch>
     <yaw>   0.0 </yaw>
    </orient>
   </thruster>
  </engine>
  <!-- Right engine -->
  <engine file="engIO360C">
   <location unit="M">
    <x> 26.4 </x>
    <y>  6.6 </y>
    <z> -3.4 </z>
   </location>
   <orient unit="DEG">
    <roll>  0.0 </roll>
    <pitch> 0.0 </pitch>
    <yaw>   0.0 </yaw>
   </orient>
   <feed>1</feed>
   <thruster file="propHO-V373-D">
    <location unit="M">
     <x> 25.5 </x>
     <y>  8.6 </y>
     <z> -3.5 </z>
    </location>
    <orient unit="DEG">
     <roll>  0.0 </roll>
     <pitch> 0.0 </pitch>
     <yaw>   0.0 </yaw>
    </orient>
   </thruster>
  </engine>
  <!-- Aft engine -->
  <engine file="engIO360C">
   <location unit="M">
    <x> 73.0 </x>
    <y>  0.0 </y>
    <z>  0.0 </z>
   </location>
   <orient unit="DEG">
    <roll>  0.0 </roll>
    <pitch> 0.0 </pitch>
    <yaw>   0.0 </yaw>
   </orient>
   <feed>2</feed>
   <thruster file="propHO-V373-D">
    <location unit="M">
     <x> 74.9 </x>
     <y>  0.0 </y>
     <z>  0.0 </z>
    </location>
    <orient unit="DEG">
     <roll>  0.0 </roll>
     <pitch> 0.0 </pitch>
     <yaw>   0.0 </yaw>
    </orient>
   </thruster>
  </engine>

  <!-- Aft auxilliary engine -->
  <engine file="electric147kW">
   <location unit="M">
    <x> 73.64 </x>
    <y>  0.0  </y>
    <z>  0.0  </z>
   </location>
   <orient unit="DEG">
    <roll>  0.0 </roll>
    <pitch> 0.0 </pitch>
    <yaw>   0.0 </yaw>
   </orient>
   <thruster file="prop_Clark_Y7570">
    <location unit="M">
     <x> 73.64 </x>
     <y> -1.10 </y>
     <z>  0.20 </z>
    </location>
    <orient unit="DEG">
     <roll>   0.0 </roll>
     <pitch>  0.0 </pitch>
     <yaw>  -90.0 </yaw>
    </orient>
   </thruster>
  </engine>

  <!--
  === Fuel tanks ============================================
  -->
  <documentation>
   Fuel capacity according to [FAA:2008:AS1CE]:
     110.95 (US)gallons usable at gondola station 29.3 m (LH)
     110.95 (US)gallons usable at gondola station 29.3 m (RH)
      84.57 (US)gallons usable at gondola station 76.6 m (Aft)
   The unusable fuel is included in the empty weight.
   (NOTE: Account for it here, anyway)
  </documentation>

  <tank type="FUEL">
   <location unit="M">
    <x> 26.4 </x>
    <y> -6.6 </y>
    <z> -3.4 </z>
   </location>
   <!-- 275 kg AVGAS, density 0.72 kg/liter. -->
   <capacity unit="KG"> 275.0 </capacity>
   <contents unit="KG"> 250.0 </contents>
  </tank>
  <tank type="FUEL">
   <location unit="M">
    <x> 26.4 </x>
    <y>  6.6 </y>
    <z> -3.4 </z>
   </location>
   <!-- 275 kg AVGAS, density 0.72 kg/liter. -->
   <capacity unit="KG"> 275.0 </capacity>
   <contents unit="KG"> 250.0 </contents>
  </tank>
  <tank type="FUEL">
   <location unit="M">
    <x> 70.0 </x>
    <y>  0.0 </y>
    <z>  0.0 </z>
   </location>
   <!-- 275 kg AVGAS, density 0.72 kg/liter. -->
   <capacity unit="KG"> 275.0 </capacity>
   <contents unit="KG"> 250.0 </contents>
  </tank>

 </propulsion>

 <!--
 === Gas cell ==============================================================
 -->

 <buoyant_forces>
  <documentation>
   Envelope and ballonet according to [EASA:2008:TC_LZ_N07]:
     Volume  envelope      8,450 m^3
             ballonet fwd  600 m^3, or
                           410 m^3 (Option B10/20)
             ballonet aft  1,600 m^3, or
                           1,065 m^3 (Option B10/20)
     Length                75.1 m
     Diameter              14.2 m
     Maximum width         19.5 m
     Height                19.4 m

   Buoyancy Centre         34.15 m aft of bow.
  </documentation>
  <documentation>
   Envelope and ballonet according to [FAA:2008:AS1CE]:
     Envelope
       Volume              298,409 ft^3 (8450 m^3)
       Maximum pressure    2.4 inH2O (600 Pa)
       Minimum pressure    1.2 inH2O (300 Pa)

     Ballonets (2)
       Volume              21,189 ft^3 or with Option B10 14,479ft^3 forward
       Volume              56,504 ft^3 aft

     Lifting Gas           Helium, recommended minimum purity 94%
  </documentation>
  <limitations>
   NOTE: The ballonets are placed based on a guess.
  </limitations>

  <!-- External environment properties -->
  <property> environment/sun-angle-rad </property>
  <property> environment/sun-radiation-norm </property>

  <!-- Ballonet system interface properties -->
  <property> buoyant_forces/gas-cell/ballonet[0]/blower-cmd-norm </property>
  <property> buoyant_forces/gas-cell/ballonet[1]/blower-cmd-norm </property>

  <gas_cell type="HELIUM">
   <location unit="M">
    <x> 34.15 </x>
    <y>  0.00 </y>
    <z>  0.00 </z>
   </location>
   <x_radius unit="M"> 40.50 </x_radius>
   <y_radius unit="M">  7.05 </y_radius>
   <z_radius unit="M">  7.05 </z_radius>
   <max_overpressure unit="PA"> 600.0 </max_overpressure>
   <valve_coefficient unit="M4*SEC/KG"> 0.0075 </valve_coefficient>
   <fullness>0.95</fullness>

   <!-- heat exchange with the environment. [lb ft / sec] -->
   <!-- Note: The surface area of an ellipsiod is approximately
              4*pi*((a^p*b^p + a^p*c^p + b^p*c^p)/3)^(1/p)
              where p=1.6075
   -->
   <heat>
    <!-- Heat transfer due to temperature difference. -->
    <function name="buoyant_forces/gas-cell/dU_conduction">
     <product>
      <value> 28309.08 </value> <!-- Surface area [ft2] -->
      <value>     0.05 </value> <!-- Conductivity [lb / (K ft sec)] (Guess) -->
      <difference>
       <property> atmosphere/T-R </property>
       <property> buoyant_forces/gas-cell/temp-R </property>
      </difference>
     </product>
    </function>
    <function name="buoyant_forces/gas-cell/dU_radiation">
     <product>
      <value> 0.1714e-8 </value> <!-- Stefan-Boltzmann's constant
                                      [Btu / (h ft^2 R^4)] -->
      <value>       0.2 </value> <!-- Emissivity [0,1] (Guess) -->
      <value>  28309.08 </value> <!-- Surface area [ft2] -->
      <difference>
       <pow>
        <property> atmosphere/T-R </property>
        <value> 4.0 </value>
       </pow>
       <pow>
        <property> buoyant_forces/gas-cell/temp-R </property>
        <value> 4.0 </value>
       </pow>
      </difference>
     </product>
    </function>
    <!-- Heat gain due to solar radiation. Pure guess work. -->
    <function name="buoyant_forces/gas-cell/dU_sun">
     <product>
      <value>   7.2330 </value> <!-- Conversion to [lb ft / s] -->
      <value>   775.19 </value> <!-- Estimated projected surface area [m2] -->
      <value>  1300.00 </value> <!-- Solar energy flow [W/m2] -->
      <value>     0.01 </value> <!-- Guess -->
      <property> environment/sun-radiation-norm </property>
      <max>
       <value> 0.0 </value>
       <difference>
        <value> 1.5708 </value>
        <property> environment/sun-angle-rad </property>
       </difference>
      </max>
     </product>
    </function>

   </heat>

   <!-- Fore ballonet -->
   <ballonet type="AIR">
    <location unit="M">
     <x> 15.0 </x>
     <y>  0.0 </y>
     <z> -3.5 </z>
    </location>
    <x_radius unit="M">  15.0 </x_radius>
    <y_radius unit="M">  5.00 </y_radius>
    <z_radius unit="M">  3.50 </z_radius>
    <max_overpressure unit="PA"> 550.0 </max_overpressure>
    <valve_coefficient unit="M4*SEC/KG"> 0.01 </valve_coefficient>
    <fullness>0.8</fullness>
    <heat>
     <!-- Heat transfer due to temperature difference. -->
     <function name="buoyant_forces/gas-cell/ballonet[0]/dU_conduction">
      <product>
       <value> 7020.33 </value> <!-- Surface area [ft2] -->
       <value>    0.05 </value> <!-- Conductivity [lb / (K ft sec)] (Guess) -->
       <difference>
        <property> buoyant_forces/gas-cell/temp-R </property>
        <property> buoyant_forces/gas-cell/ballonet[0]/temp-R </property>
       </difference>
      </product>
     </function>
     <function name="buoyant_forces/gas-cell/ballonet[0]/dU_radiation">
      <product>
       <value> 0.1714e-8 </value> <!-- Stefan-Boltzmann's constant
                                       [Btu / (h ft^2 R^4)] -->
       <value>       0.2 </value> <!-- Emissivity [0,1] (Guess) -->
       <value>   7020.33 </value> <!-- Surface area [ft2] -->
       <difference>
        <pow>
         <property> buoyant_forces/gas-cell/temp-R </property>
         <value> 4.0 </value>
        </pow>
        <pow>
         <property> buoyant_forces/gas-cell/ballonet[0]/temp-R </property>
         <value> 4.0 </value>
        </pow>
       </difference>
      </product>
     </function>
    </heat>
    <blower_input>
     <function name="buoyant_forces/gas-cell/ballonet[0]/in-flow-ft3ps">
      <product>
       <value> 100.0 </value>
       <property>buoyant_forces/gas-cell/ballonet[0]/blower-cmd-norm</property>
      </product>
     </function>
    </blower_input>
   </ballonet>
   <!-- Aft ballonet -->
   <ballonet type="AIR">
    <location unit="M">
     <x> 56.5 </x>
     <y>  0.0 </y>
     <z> -3.5 </z>
    </location>
    <x_radius unit="M">  15.0 </x_radius>
    <y_radius unit="M">  5.00 </y_radius>
    <z_radius unit="M">  3.50 </z_radius>
    <max_overpressure unit="PA"> 550.0 </max_overpressure>
    <valve_coefficient unit="M4*SEC/KG"> 0.01 </valve_coefficient>
    <fullness>0.8</fullness>
    <heat>
     <!-- Heat transfer due to temperature difference. -->
     <function name="buoyant_forces/gas-cell/ballonet[1]/dU_conduction">
      <product>
       <value> 7020.33 </value> <!-- Surface area [ft2] -->
       <value>    0.05 </value> <!-- Conductivity [lb / (K ft sec)] (Guess) -->
       <difference>
        <property> buoyant_forces/gas-cell/temp-R </property>
        <property> buoyant_forces/gas-cell/ballonet[1]/temp-R </property>
       </difference>
      </product>
     </function>
     <function name="buoyant_forces/gas-cell/ballonet[1]/dU_radiation">
      <product>
       <value> 0.1714e-8 </value> <!-- Stefan-Boltzmann's constant
                                       [Btu / (h ft^2 R^4)] -->
       <value>       0.2 </value> <!-- Emissivity [0,1] (Guess) -->
       <value>   7020.33 </value> <!-- Surface area [ft2] -->
       <difference>
        <pow>
         <property> buoyant_forces/gas-cell/temp-R </property>
         <value> 4.0 </value>
        </pow>
        <pow>
         <property> buoyant_forces/gas-cell/ballonet[1]/temp-R </property>
         <value> 4.0 </value>
        </pow>
       </difference>
      </product>
     </function>
    </heat>
    <blower_input>
     <function name="buoyant_forces/gas-cell/ballonet[1]/in-flow-ft3ps">
      <product>
       <value> 100.0 </value>
       <property>buoyant_forces/gas-cell/ballonet[1]/blower-cmd-norm</property>
      </product>
     </function>
    </blower_input>
   </ballonet>

  </gas_cell>

 </buoyant_forces>

 <!--
 === Ballonet control system ===============================================
 -->
 <system name="Ballonet control">

  <!-- Interface properties -->
  <property>fcs/ballonet-inflation-cmd-norm[0]</property>
  <property>fcs/ballonet-inflation-cmd-norm[1]</property>

  <documentation>
   Range [-1, 1].
   Positive values maps to blower inflow percentage and
   negative values maps to valve open percentage.
  </documentation>

  <channel name="Ballonet control">

   <fcs_function name="fcs/blower-cmd-norm[0]">
    <function>
     <max>
      <value> 0.0 </value>
      <property> fcs/ballonet-inflation-cmd-norm[0] </property>
     </max>
    </function>
    <output>buoyant_forces/gas-cell/ballonet[0]/blower-cmd-norm</output>
   </fcs_function>
   <fcs_function name="fcs/valve-cmd-norm[0]">
    <function>
     <product>
      <value> -1.0 </value>
      <min>
       <value> 0.0 </value>
       <property> fcs/ballonet-inflation-cmd-norm[0] </property>
      </min>
     </product>
    </function>
    <output> buoyant_forces/gas-cell/ballonet[0]/valve_open </output>
   </fcs_function>

   <fcs_function name="fcs/blower-cmd-norm[1]">
    <function>
     <max>
      <value> 0.0 </value>
      <property> fcs/ballonet-inflation-cmd-norm[1] </property>
     </max>
    </function>
    <output>buoyant_forces/gas-cell/ballonet[1]/blower-cmd-norm</output>
   </fcs_function>
   <fcs_function name="fcs/valve-cmd-norm[1]">
    <function>
     <product>
      <value> -1.0 </value>
      <min>
       <value> 0.0 </value>
       <property> fcs/ballonet-inflation-cmd-norm[1] </property>
      </min>
     </product>
    </function>
    <output> buoyant_forces/gas-cell/ballonet[1]/valve_open </output>
   </fcs_function>

  </channel>
 </system>

 <!--
 ==== Initial static condition weigh-off ====================================
 -->
 <system name="Weigh_Off">
  <channel name="Initial_Static_Weigh_Off">
   <!-- This system ensures that the ship starts slightly heavy. -->
   <!-- The weight of inertia/pointmass-weight-lbs[0] is set from Nasal. -->

   <summer name="static-condition/net-lift-lbs">
    <input> buoyant_forces/gas-cell[0]/buoyancy-lbs </input>
    <input> -inertia/weight-lbs </input>
   </summer>

  </channel>
 </system>

 <!--
 === Static Trim ============================================================
 -->
 <system name="Static trim">
  <!-- Note: static-trim-cmd-norm is for FDM development. -->
  <property value="0.3">fcs/static-trim-cmd-norm</property>

  <channel name="StaticTrim">
   <!--
    This is for CG tweaking.
   -->

   <summer name="fcs/static-trim-norm">
    <input>fcs/static-trim-cmd-norm</input>
    <clipto>
     <min>0</min>
     <max>1</max>
    </clipto>
   </summer>

   <summer name="fcs/inverse-static-trim-norm">
    <input>-fcs/static-trim-norm</input>
    <bias>1</bias>
    <clipto>
     <min>0</min>
     <max>1</max>
    </clipto>
   </summer>

   <aerosurface_scale name="Ballast Trim Fore">
    <input>fcs/inverse-static-trim-norm</input>
     <domain>
     <min>0</min>
     <max>1</max>
    </domain>
    <range>
     <min>0</min>
     <max>500</max>
    </range>
    <output>inertia/pointmass-weight-lbs[1]</output>
   </aerosurface_scale>

   <aerosurface_scale name="Ballast Trim Aft">
    <input>fcs/static-trim-norm</input>
    <domain>
     <min>0</min>
     <max>1</max>
    </domain>
    <range>
     <min>0</min>
     <max>500</max>
    </range>
    <output>inertia/pointmass-weight-lbs[2]</output>
   </aerosurface_scale>

  </channel>
 </system>

 <!--
 ==== Instrumentation =======================================================
 -->
 <system name="Instrumentation">
  <channel name="">

  <fcs_function name="instrumentation/gas-pressure-psf">
   <function>
    <difference>
     <property> buoyant_forces/gas-cell/pressure-psf </property>
     <property> atmosphere/P-psf </property>
    </difference>
   </function>
  </fcs_function>

  <fcs_function name="instrumentation/ballonet-pressure-psf[0]">
   <function>
    <difference>
     <property> buoyant_forces/gas-cell/ballonet[0]/pressure-psf[0] </property>
     <property> atmosphere/P-psf </property>
    </difference>
   </function>
  </fcs_function>

  <fcs_function name="instrumentation/ballonet-pressure-psf[1]">
   <function>
    <difference>
     <property> buoyant_forces/gas-cell/ballonet[1]/pressure-psf </property>
     <property> atmosphere/P-psf </property>
    </difference>
   </function>
  </fcs_function>

  </channel>
 </system>

 <!--
 ==== Flight control system =================================================
 -->
 <flight_control name="NT FCS">

  <documentation>
   Controls according to [FAA:2008:AS1CE]:
     Control Surface Movements +/- 20 degrees.
     Vectored Thrust Movements
       Side Engines            0 (forward horizontal) to 120 degrees up.
       Aft Engine              0 (aft horizontal) tp 90 degrees down.
   Avoid sustained operation with forward swivel angles between
   43 and 57 degrees during normal operation.
  </documentation>

  <documentation>
   Engine controls (from pictures of the engine panel and other sources)
   - RPM SEL levers
     - LH AFT RH: IDLE - ?  (to 1250RPM - max according to [FAA:2008:E8-6600])
     - fcs/throttle-cmd-norm[1|2|3]
   - Mixture levers
     - LH AFT RH: LEAN - RICH
     - the standard mixture properties
   - Thrust (prop pitch) levers (direct propeller pitch [FAA:2008:E8-6600])
     - LH RH AFT: REV - ZERO - T/O - CRUISE
     - the standard propeller pitch properties
   - Swivel levers
     - LH RH: 0 - 120 degrees
     - AFT:   0 - (-)90 degrees (only 0 or -90 according to [FAA:2008:E8-6600])
     - fcs/side-engine-swivel-cmd-norm[1|2], fcs/rear-engine-swivel-cmd-norm
  </documentation>

  <property>fcs/side-engine-swivel-cmd-norm[0]</property>
  <property>fcs/side-engine-swivel-cmd-norm[1]</property>
  <property>fcs/rear-engine-swivel-cmd-norm</property>

  <documentation>
   I have not seen any controls for the auxilliary rear side propeller
   so I assume that it is controlled by the FCS in response to yaw
   requests.
  </documentation>

  <!-- FlightGear multiplayer dual control. -->
  <property>fcs/dual-control/enabled</property>

  <property>fcs/copilot-elevator-cmd-norm</property>
  <property>fcs/copilot-rudder-cmd-norm</property>
  <property>fcs/dual-control/propeller-speed-cmd-norm[0]</property>
  <property>fcs/dual-control/propeller-speed-cmd-norm[1]</property>
  <property>fcs/dual-control/propeller-speed-cmd-norm[2]</property>
  <property>fcs/dual-control/thrust-cmd-norm[0]</property>
  <property>fcs/dual-control/thrust-cmd-norm[1]</property>
  <property>fcs/dual-control/thrust-cmd-norm[2]</property>
  <property>fcs/dual-control/mixture-cmd-norm[0]</property>
  <property>fcs/dual-control/mixture-cmd-norm[1]</property>
  <property>fcs/dual-control/mixture-cmd-norm[2]</property>

  <!--
  === Pitch ==================================================
  -->
  <channel name="Pitch">

   <summer name="fcs/pitch-trim-sum">
    <input>fcs/elevator-cmd-norm</input>
    <input>fcs/pitch-trim-cmd-norm</input>
    <input>fcs/copilot-elevator-cmd-norm</input>
    <clipto>
     <min>-1</min>
     <max>1</max>
    </clipto>
   </summer>

   <aerosurface_scale name="Elevator Control">
    <input>fcs/pitch-trim-sum</input>
    <gain>0.3491</gain>
    <domain>
     <min>-1</min>
     <max>1</max>
    </domain>
    <range>
     <min>-0.3491</min>
     <max>0.3491</max>
    </range>
    <output>fcs/elevator-pos-rad</output>
   </aerosurface_scale>

   <aerosurface_scale name="Elevator Position Normalized">
    <input>fcs/elevator-pos-rad</input>
    <gain>2.8645</gain>
    <domain>
     <min>-0.3491</min>
     <max>0.3491</max>
    </domain>
    <range>
     <min>-1</min>
     <max>1</max>
    </range>
    <output>fcs/elevator-pos-norm</output>
   </aerosurface_scale>
  </channel>

  <!--
  === Yaw ====================================================
  -->
  <channel name="Yaw">
   <summer name="Yaw Trim Sum">
    <input>fcs/rudder-cmd-norm</input>
    <input>-fcs/aileron-cmd-norm</input> <!-- Save my fragile rudder axis. -->
    <input>fcs/yaw-trim-cmd-norm</input>
    <input>fcs/copilot-rudder-cmd-norm</input>
    <clipto>
     <min>-1</min>
     <max>1</max>
    </clipto>
   </summer>

   <aerosurface_scale name="Rudder Control">
    <input>fcs/yaw-trim-sum</input>
    <gain>0.3491</gain>
    <domain>
     <min>-1</min>
     <max>1</max>
    </domain>
    <range>
     <min>-0.3491</min>
     <max>0.3491</max>
    </range>
    <output>fcs/rudder-pos-rad</output>
   </aerosurface_scale>

   <aerosurface_scale name="Rudder Position Normalized">
    <input>fcs/rudder-pos-rad</input>
    <gain>2.8645</gain>
    <domain>
     <min>-0.3491</min>
     <max>0.3491</max>
    </domain>
    <range>
     <min>-1</min>
     <max>1</max>
    </range>
    <output>fcs/rudder-pos-norm</output>
   </aerosurface_scale>

  </channel>

  <!--
  === Active yaw control augmentation ========================
  -->
  <channel name="Active yaw control augmentation">
   <!-- Is there a similar augmentation for pitch control?
        No, I have seen no mention of it in the FAA or EASA documents.
   -->

   <scheduled_gain name="Rear side thruster">
    <input>fcs/yaw-trim-sum</input>
    <gain>1.0</gain>
    <table>
     <independentVar>velocities/vc-kts</independentVar>
     <tableData>
      0.0   1.0
      5.0   1.0
      35.0  0.0
     </tableData>
    </table>
    <output>fcs/rear-side-thrust-cmd-norm</output>
   </scheduled_gain>

   <switch name="fcs/rear-side-thrust-cmd-switch">
    <default value="0.0"/>
    <test value="fcs/rear-side-thrust-cmd-norm">
      /engines/engine[2]/running == 1
    </test>
   </switch>

   <!-- Replace with propeller pitch control later? -->
   <switch name="Rear side thruster direction">
    <default value="1.5708"/>
    <test logic="AND" value="-1.5708">
     fcs/rear-side-thrust-cmd-switch LT 0.0
    </test>
    <output>propulsion/engine[3]/yaw-angle-rad</output>
   </switch>

   <switch name="Rear side thruster throttle">
    <default value="fcs/rear-side-thrust-cmd-switch"/>
    <test logic="AND" value="-fcs/rear-side-thrust-cmd-switch">
     fcs/rear-side-thrust-cmd-norm LT 0.0
    </test>
    <output>fcs/throttle-pos-norm[3]</output>
   </switch>

  </channel>

  <!--
  === Thrust vectoring =======================================
  -->
  <channel name="Thrust vectoring">

   <aerosurface_scale name="fcs/side-engine-swivel-cmd-rad">
    <input>fcs/side-engine-swivel-cmd-norm</input>
    <domain>
     <min>0</min>
     <max>1</max>
    </domain>
    <range>
     <min>0</min>
     <max>2.0944</max>
    </range>
   </aerosurface_scale>
   <actuator name="fcs/left-engine-swivel-actuator">
    <input>fcs/side-engine-swivel-cmd-rad</input>
    <!-- lag> number </lag -->
    <rate_limit> 0.5 </rate_limit>
    <!-- bias> number </bias -->
    <!-- deadband_width> number </deadband_width -->
    <!-- hysteresis_width> number </hysteresis_width -->
    <clipto>
     <min>0.0</min>
     <max>2.0944</max>
    </clipto>
    <output>propulsion/engine[0]/pitch-angle-rad</output>
   </actuator>

   <aerosurface_scale name="fcs/side-engine-swivel-cmd-rad[1]">
    <input>fcs/side-engine-swivel-cmd-norm</input>
    <domain>
     <min>0</min>
     <max>1</max>
    </domain>
    <range>
     <min>0</min>
     <max>2.0944</max>
    </range>
   </aerosurface_scale>
   <actuator name="fcs/right-engine-swivel-actuator">
    <input>fcs/side-engine-swivel-cmd-rad[1]</input>
    <!-- lag> number </lag -->
    <rate_limit> 0.5 </rate_limit>
    <!-- bias> number </bias -->
    <!-- deadband_width> number </deadband_width -->
    <!-- hysteresis_width> number </hysteresis_width -->
    <clipto>
     <min>0.0</min>
     <max>2.0944</max>
    </clipto>
    <output>propulsion/engine[1]/pitch-angle-rad</output>
   </actuator>

   <aerosurface_scale name="fcs/rear-engine-swivel-cmd-rad">
    <input>fcs/rear-engine-swivel-cmd-norm</input>
    <domain>
     <min>0</min>
     <max>1</max>
    </domain>
    <range>
     <min>0.0</min>
     <max>1.5708</max>
    </range>
   </aerosurface_scale>
   <actuator name="fcs/rear-engine-swivel-actuator">
    <input>fcs/rear-engine-swivel-cmd-rad</input>
    <!-- lag> number </lag -->
    <rate_limit> 0.5 </rate_limit>
    <!-- bias> number </bias -->
    <!-- deadband_width> number </deadband_width -->
    <!-- hysteresis_width> number </hysteresis_width -->
    <clipto>
     <min>0.0</min>
     <max>1.5708</max>
    </clipto>
    <output>propulsion/engine[2]/pitch-angle-rad</output>
   </actuator>

  </channel>

  <!--
  === Engine throttle control ================================
  -->
  <channel name="Engine 1 throttle control">

   <!-- Enable/disable dual-control. -->
   <switch name="fcs/propeller-speed-cmd-norm[0]">
    <default value="fcs/throttle-cmd-norm[0]"/>
    <test logic="AND" value="fcs/dual-control/propeller-speed-cmd-norm[0]">
     fcs/dual-control/enabled GE 0.5
    </test>
   </switch>

   <aerosurface_scale name="fcs/etc/propeller-speed-cmd-rpm[0]">
    <input>fcs/propeller-speed-cmd-norm[0]</input>
    <domain>
     <min>0</min>
     <max>1</max>
    </domain>
    <range>
     <min>300</min>
     <max>1250</max>
    </range>
    <zero_centered>0</zero_centered>
   </aerosurface_scale>

   <summer name="fcs/etc/propeller-speed-error-rpm[0]">
    <input>fcs/etc/propeller-speed-cmd-rpm[0]</input>
    <input>-propulsion/engine[0]/propeller-rpm</input>
   </summer>

   <switch name="fcs/etc/propeller-speed-error-switch[0]">
    <default value="0.0"/>
    <test value="fcs/etc/propeller-speed-error-rpm[0]">
      /engines/engine[0]/running == 1
    </test>
   </switch>

   <switch name="fcs/etc/windup-trigger[0]">
    <default value="0.0"/>
    <test value="1.0">
      fcs/etc/throttle-controller-pid[0] LT 0.0
    </test>
    <test value="1.0">
      fcs/etc/throttle-controller-pid[0] GT 1.0
    </test>
   </switch>

   <pid name="fcs/etc/throttle-controller-pid[0]">
    <input>fcs/etc/propeller-speed-error-switch[0]</input>
    <kp> 0.0001 </kp>
    <ki> 0.01 </ki>
    <trigger>fcs/etc/windup-trigger[0]</trigger>
   </pid>

   <actuator name="fcs/etc/throttle-actuator[0]">
    <input>fcs/etc/throttle-controller-pid[0]</input>
    <!-- lag> number </lag -->
    <!-- rate_limit> number </rate_limit -->
    <!-- bias> number </bias -->
    <!-- deadband_width> number </deadband_width -->
    <!-- hysteresis_width> number </hysteresis_width -->
    <clipto>
     <min>0.0</min>
     <max>1.0</max>
    </clipto>
    <output>fcs/throttle-pos-norm[0]</output>
   </actuator>

  </channel>

  <channel name="Engine 2 throttle control">

   <!-- Enable/disable dual-control. -->
   <switch name="fcs/propeller-speed-cmd-norm[1]">
    <default value="fcs/throttle-cmd-norm[1]"/>
    <test logic="AND" value="fcs/dual-control/propeller-speed-cmd-norm[1]">
     fcs/dual-control/enabled GE 0.5
    </test>
   </switch>

   <aerosurface_scale name="fcs/etc/propeller-speed-cmd-rpm[1]">
    <input>fcs/propeller-speed-cmd-norm[1]</input>
    <domain>
     <min>0</min>
     <max>1</max>
    </domain>
    <range>
     <min>300</min>
     <max>1250</max>
    </range>
    <zero_centered>0</zero_centered>
   </aerosurface_scale>

   <summer name="fcs/etc/propeller-speed-error-rpm[1]">
    <input>fcs/etc/propeller-speed-cmd-rpm[1]</input>
    <input>-propulsion/engine[1]/propeller-rpm</input>
   </summer>

   <switch name="fcs/etc/propeller-speed-error-switch[1]">
    <default value="0.0"/>
    <test value="fcs/etc/propeller-speed-error-rpm[1]">
      /engines/engine[1]/running == 1
    </test>
   </switch>

   <switch name="fcs/etc/windup-trigger[1]">
    <default value="0.0"/>
    <test value="1.0">
      fcs/etc/throttle-controller-pid[1] LT 0.0
    </test>
    <test value="1.0">
      fcs/etc/throttle-controller-pid[1] GT 1.0
    </test>
   </switch>

   <pid name="fcs/etc/throttle-controller-pid[1]">
    <input>fcs/etc/propeller-speed-error-switch[1]</input>
    <kp> 0.0001 </kp>
    <ki> 0.01 </ki>
    <trigger>fcs/etc/windup-trigger[1]</trigger>
   </pid>

   <actuator name="fcs/etc/throttle-actuator[1]">
    <input>fcs/etc/throttle-controller-pid[1]</input>
    <!-- lag> number </lag -->
    <!-- rate_limit> number </rate_limit -->
    <!-- bias> number </bias -->
    <!-- deadband_width> number </deadband_width -->
    <!-- hysteresis_width> number </hysteresis_width -->
    <clipto>
     <min>0.0</min>
     <max>1.0</max>
    </clipto>
    <output>fcs/throttle-pos-norm[1]</output>
   </actuator>

  </channel>

  <channel name="Engine 3 throttle control">

   <!-- Enable/disable dual-control. -->
   <switch name="fcs/propeller-speed-cmd-norm[2]">
    <default value="fcs/throttle-cmd-norm[2]"/>
    <test logic="AND" value="fcs/dual-control/propeller-speed-cmd-norm[2]">
     fcs/dual-control/enabled GE 0.5
    </test>
   </switch>

   <aerosurface_scale name="fcs/etc/propeller-speed-cmd-rpm[2]">
    <input>fcs/propeller-speed-cmd-norm[2]</input>
    <domain>
     <min>0</min>
     <max>1</max>
    </domain>
    <range>
     <min>300</min>
     <max>1250</max>
    </range>
    <zero_centered>0</zero_centered>
   </aerosurface_scale>

   <summer name="fcs/etc/propeller-speed-error-rpm[2]">
    <input>fcs/etc/propeller-speed-cmd-rpm[2]</input>
    <input>-propulsion/engine[2]/propeller-rpm</input>
   </summer>

   <switch name="fcs/etc/propeller-speed-error-switch[2]">
    <default value="0.0"/>
    <test value="fcs/etc/propeller-speed-error-rpm[2]">
      /engines/engine[2]/running == 1
    </test>
   </switch>

   <switch name="fcs/etc/windup-trigger[2]">
    <default value="0.0"/>
    <test value="1.0">
      fcs/etc/throttle-controller-pid[2] LT 0.0
    </test>
    <test value="1.0">
      fcs/etc/throttle-controller-pid[2] GT 1.0
    </test>
   </switch>

   <pid name="fcs/etc/throttle-controller-pid[2]">
    <input>fcs/etc/propeller-speed-error-switch[2]</input>
    <kp> 0.0001 </kp>
    <ki> 0.01 </ki>
    <trigger>fcs/etc/windup-trigger[2]</trigger>
   </pid>

   <actuator name="fcs/etc/throttle-actuator[2]">
    <input>fcs/etc/throttle-controller-pid[2]</input>
    <!-- lag> number </lag -->
    <!-- rate_limit> number </rate_limit -->
    <!-- bias> number </bias -->
    <!-- deadband_width> number </deadband_width -->
    <!-- hysteresis_width> number </hysteresis_width -->
    <clipto>
     <min>0.0</min>
     <max>1.0</max>
    </clipto>
    <output>fcs/throttle-pos-norm[2]</output>
   </actuator>

  </channel>

  <!--
  === Thrust control =========================================
  -->
  <channel name="Thrust control">

   <!-- Enable/disable dual-control. -->
   <switch name="fcs/dual-control/advance-pos-norm[0]">
    <default value="fcs/advance-cmd-norm[0]"/>
    <test logic="AND" value="fcs/dual-control/thrust-cmd-norm[0]">
     fcs/dual-control/enabled GE 0.5
    </test>
    <output>fcs/advance-pos-norm[0]</output>
   </switch>
   <switch name="fcs/dual-control/advance-pos-norm[1]">
    <default value="fcs/advance-cmd-norm[1]"/>
    <test logic="AND" value="fcs/dual-control/thrust-cmd-norm[1]">
     fcs/dual-control/enabled GE 0.5
    </test>
    <output>fcs/advance-pos-norm[1]</output>
   </switch>
   <switch name="fcs/dual-control/advance-pos-norm[2]">
    <default value="fcs/advance-cmd-norm[2]"/>
    <test logic="AND" value="fcs/dual-control/thrust-cmd-norm[2]">
     fcs/dual-control/enabled GE 0.5
    </test>
    <output>fcs/advance-pos-norm[2]</output>
   </switch>

  </channel>

  <!--
  === Mixture control ========================================
  -->
  <channel name="Mixture control">

   <!-- Enable/disable dual-control. -->
   <switch name="fcs/dual-control/mixture-pos-norm[0]">
    <default value="fcs/mixture-cmd-norm[0]"/>
    <test logic="AND" value="fcs/dual-control/mixture-cmd-norm[0]">
     fcs/dual-control/enabled GE 0.5
    </test>
    <output>fcs/mixture-pos-norm[0]</output>
   </switch>
   <switch name="fcs/dual-control/mixture-pos-norm[1]">
    <default value="fcs/mixture-cmd-norm[1]"/>
    <test logic="AND" value="fcs/dual-control/mixture-cmd-norm[1]">
     fcs/dual-control/enabled GE 0.5
    </test>
    <output>fcs/mixture-pos-norm[1]</output>
   </switch>
   <switch name="fcs/dual-control/mixture-pos-norm[2]">
    <default value="fcs/mixture-cmd-norm[2]"/>
    <test logic="AND" value="fcs/dual-control/mixture-cmd-norm[2]">
     fcs/dual-control/enabled GE 0.5
    </test>
    <output>fcs/mixture-pos-norm[2]</output>
   </switch>

  </channel>

 </flight_control>

 <!--
 ==== External reactions ====================================================
 -->

 <external_reactions>

  <force name="mooring-coupling-north" frame="LOCAL">
   <location unit="M">
    <x> 0.0 </x>
    <y> 0.0 </y>
    <z> 0.0 </z>
   </location>
   <direction>
    <x> 1.0 </x>
    <y> 0.0 </y>
    <z> 0.0 </z>
   </direction>
  </force>
  <force name="mooring-coupling-east" frame="LOCAL">
   <location unit="M">
    <x> 0.0 </x>
    <y> 0.0 </y>
    <z> 0.0 </z>
   </location>
   <direction>
    <x> 0.0 </x>
    <y> 1.0 </y>
    <z> 0.0 </z>
   </direction>
  </force>
  <force name="mooring-coupling-down" frame="LOCAL">
   <location unit="M">
    <x> 0.0 </x>
    <y> 0.0 </y>
    <z> 0.0 </z>
   </location>
   <direction>
    <x> 0.0 </x>
    <y> 0.0 </y>
    <z> 1.0 </z>
   </direction>
  </force>

  <force name="added-mass-bx" frame="BODY">
   <location unit="M">
    <x> 34.3 </x>
    <y>  0.0 </y>
    <z>  0.0 </z>
   </location>
   <direction>
    <x> 1.0 </x>
    <y> 0.0 </y>
    <z> 0.0 </z>
   </direction>
  </force>
  <force name="added-mass-by" frame="BODY">
   <location unit="M">
    <x> 34.3 </x>
    <y>  0.0 </y>
    <z>  0.0 </z>
   </location>
   <direction>
    <x> 0.0 </x>
    <y> 1.0 </y>
    <z> 0.0 </z>
   </direction>
  </force>
  <force name="added-mass-bz" frame="BODY">
   <location unit="M">
    <x> 34.3 </x>
    <y>  0.0 </y>
    <z>  0.0 </z>
   </location>
   <direction>
    <x> 0.0 </x>
    <y> 0.0 </y>
    <z> 1.0 </z>
   </direction>
  </force>

  <force name="added-mass-pitch[0]" frame="BODY">
   <location unit="M">
    <x> 34.3 </x>
    <y>  0.0 </y>
    <z> -0.3048 </z>
   </location>
   <direction>
    <x> 1.0 </x>
    <y> 0.0 </y>
    <z> 0.0 </z>
   </direction>
  </force>
  <force name="added-mass-pitch[1]" frame="BODY">
   <location unit="M">
    <x> 34.3 </x>
    <y>  0.0 </y>
    <z>  0.3048 </z>
   </location>
   <direction>
    <x> 1.0 </x>
    <y> 0.0 </y>
    <z> 0.0 </z>
   </direction>
  </force>

  <force name="added-mass-yaw[0]" frame="BODY">
   <location unit="M">
    <x> 34.3 </x>
    <y> -0.3048 </y>
    <z>  0.0 </z>
   </location>
   <direction>
    <x> 1.0 </x>
    <y> 0.0 </y>
    <z> 0.0 </z>
   </direction>
  </force>
  <force name="added-mass-yaw[1]" frame="BODY">
   <location unit="M">
    <x> 34.3 </x>
    <y>  0.3048 </y>
    <z>  0.0 </z>
   </location>
   <direction>
    <x> 1.0 </x>
    <y> 0.0 </y>
    <z> 0.0 </z>
   </direction>
  </force>

 </external_reactions>

 <!-- system file="fgfs4jsbsim"/ -->
 <system file="mooring-jsbsim"/>

 <!--
 ==== Aerodynamics ==========================================================
 -->
 <system name="constants">

  <!-- Aerodynamic constants. -->
  <property value="246.1"> aero/constants/length-ft </property>
  <property value="46.3"> aero/constants/diameter-ft </property>
  <property value="62708.9"> aero/constants/length-diameter-ft2 </property>
  <property value="297526.07"> aero/constants/volume-ft3 </property>
  <property value="4456.7"> aero/constants/volume-ft3_2_3 </property>

  <!-- Added mass constants. -->
  <property value="-0.05"> aero/constants/added-mass/k-axial </property>
  <property value="-0.90"> aero/constants/added-mass/k-traverse </property>
  <property value="-0.72"> aero/constants/added-mass/k-rotational </property>

  <channel name="Temporary hack to prevent oscillations.">
   <fcs_function name="aero/constants/added-mass/tweak-factor">
    <function>
     <difference>
      <value> 1.0 </value>
      <property> mooring/moored </property>
     </difference>
    </function>
    <clipto>
     <min> 0.0 </min>
     <max> 1.0 </max>
    </clipto>
   </fcs_function>
  </channel>

 </system>

 <system file="airship_added_mass"/>

 <aerodynamics>

  <!-- Tuning parameter for CD, CL due to envelope alpha. -->
  <function name="aero/envelope-lift-force-tweak-factor">
   <value> 1.0 </value>
  </function>
  <!-- Tuning parameter for CM and CN due to alpha and beta. -->
  <function name="aero/envelope-pitch-moment-tweak-factor">
   <value> 0.25 </value>
  </function>
  <function name="aero/envelope-yaw-moment-tweak-factor">
   <value> 0.25 </value>
  </function>

  <!-- Relation between wind and body coordinate systems. -->
  <function name="aero/tmp/wx">
   <product>
    <cos>
     <property> aero/alpha-rad </property>
    </cos>
    <cos>
     <property> aero/beta-rad </property>
    </cos>
   </product>
  </function>
  <function name="aero/tmp/wy">
   <product>
    <cos>
     <property> aero/alpha-rad </property>
    </cos>
    <sin>
     <property> aero/beta-rad </property>
    </sin>
   </product>
  </function>
  <function name="aero/tmp/wz">
   <sin>
    <property> aero/alpha-rad </property>
   </sin>
  </function>
  <function name="aero/tmp/h_wy_wz">
   <pow>
    <sum>
     <pow>
      <property> aero/tmp/wy </property>
      <value>2.0</value>
     </pow>
     <pow>
      <property> aero/tmp/wz </property>
      <value>2.0</value>
     </pow>
    </sum>
    <value>0.5</value>
   </pow>
  </function>

  <!-- Effective angle between envelope and relative wind. -->
  <function name="aero/envelope-aoa-mag-rad">
   <max>
    <value>0.0</value>
    <acos>
     <property> aero/tmp/wx </property>
    </acos>
   </max>
  </function>
  <function name="aero/envelope-aoa-mag-deg">
   <product>
    <value> 57.29578 </value>
    <property> aero/envelope-aoa-mag-rad </property>
   </product>
  </function>

  <!--
  === Forces =================================================
  -->
  <limitation>
   The current method of splitting L_env_aoa into LIFT and SIDE forces
   seems to have the wrong sign when alpha GT 90 and beta LT 0?
  </limitation>
  <function name="aero/force/L_env_aoa">
   <description>Total_lift_force_from_envelope_due_to_aoa</description>
   <!--
        Formulation based on NACA report 432 "Force measurements on a
        1/40-scale model of the U.S. Airship Akron" by Hugh B. Freeman.

           C = L / (q * (vol)^(2/3))

   -->
   <product>
    <property>aero/qbar-psf</property>
    <property>aero/constants/volume-ft3_2_3</property>
    <!-- Start CL_env -->
    <property>aero/envelope-lift-force-tweak-factor</property>
    <table>
     <independentVar lookup="row">aero/envelope-aoa-mag-deg</independentVar>
     <!--  Virtual wind-tunnel data computed with Gerris. -->
     <!--  From Submarine Scout. -->
     <tableData>
       0     0.000000
       10    0.002911
       20    0.007450
       30    0.013047
       45    0.016276
       60    0.028917
       75    0.028148
       90    0.017636
       105   -0.010199
       120   -0.008625
       135   -0.011184
       150   -0.009168
       165   -0.002132
       180   0.000000
     </tableData>
    </table>
   </product>
  </function>

  <!-- ================================================== -->
  <axis name="DRAG">

   <function name="aero/force/D_env_aoa">
    <description>Drag_from_envelope_due_to_angle_of_attack</description>
    <!--
         Formulation based on NACA report 432 "Force measurements on a
         1/40-scale model of the U.S. Airship Akron" by Hugh B. Freeman.

            CD = D / (q * (vol)^(2/3))

    -->
    <!-- Note: This function accounts for drag due to both alpha and beta. -->
    <product>
     <property>aero/qbar-psf</property>
     <property>aero/constants/volume-ft3_2_3</property>
     <!-- Start CD -->
     <property>aero/envelope-lift-force-tweak-factor</property>
     <table>
      <independentVar lookup="row">aero/envelope-aoa-mag-deg</independentVar>
      <!-- Virtual wind-tunnel data computed with Gerris. -->
      <tableData>
       0     0.0059211
       10    0.0084486
       20    0.0088926
       30    0.0178950
       45    0.0325350
       60    0.0506840
       75    0.0766400
       90    0.0999370
       105   0.0866310
       120   0.0561820
       135   0.0342520
       150   0.0154610
       165   0.0042752
       180   0.0018604
      </tableData>
     </table>
    </product>
   </function>

   <function name="aero/force/D_hfin_alpha">
    <description>Drag_from_horizontal_fin_due_to_alpha</description>
    <!--
         Formulation based on NACA report 432 "Force measurements on a
         1/40-scale model of the U.S. Airship Akron" by Hugh B. Freeman.

            CD = D / (q * (vol)^(2/3))

    -->
    <product>
     <property>aero/qbar-psf</property>
     <property>aero/constants/volume-ft3_2_3</property>
     <!-- Start CD -->
     <table>
      <independentVar lookup="row">aero/alpha-deg</independentVar>
      <!-- Virtual wind-tunnel data computed with Gerris. -->
      <tableData>
       -180   0.0016346
       -165   0.0135650
       -150   0.0745610
       -135   0.1331500
       -120   0.1771500
       -105   0.2169500
       -90    0.1910000
       -75    0.2154000
       -60    0.17049
       -45    0.14314
       -30    0.072847
       -20    0.027739
       -10    0.0089855
       0      0.0010200
       10     0.0089855
       20     0.027739
       30     0.072847
       45     0.14314
       60     0.17049
       75     0.2154000
       90     0.1910000
       105    0.2169500
       120    0.1771500
       135    0.1331500
       150    0.0745610
       165    0.0135650
       180    0.0016346
      </tableData>
     </table>
    </product>
   </function>

   <function name="aero/force/D_de">
    <description>Drag_due_to_elevator_deflection</description>
    <!--
         Formulation based on NACA report 432 "Force measurements on a
         1/40-scale model of the U.S. Airship Akron" by Hugh B. Freeman.

            CD = D / (q * (vol)^(2/3))

    -->
    <product>
     <property>aero/qbar-psf</property>
     <property>aero/constants/volume-ft3_2_3</property>
     <!-- Start CD -->
     <value> 1.0 </value>
     <table>
      <independentVar lookup="row">fcs/elevator-pos-deg</independentVar>
      <!--  Virtual wind-tunnel data computed with Gerris. -->
      <tableData>
       -30  0.020407
       0    0
       30   0.020407
      </tableData>
     </table>
    </product>
   </function>

   <function name="aero/force/D_vfin_beta">
    <description>Drag_from_vertical_fin_due_to_beta</description>
    <!--
         Formulation based on NACA report 432 "Force measurements on a
         1/40-scale model of the U.S. Airship Akron" by Hugh B. Freeman.

            CD = D / (q * (vol)^(2/3))

    -->
    <product>
     <property>aero/qbar-psf</property>
     <property>aero/constants/volume-ft3_2_3</property>
     <!-- Start CD -->
     <value> 1.0 </value>
     <table>
      <independentVar lookup="row">aero/beta-deg</independentVar>
      <!-- Virtual wind-tunnel data computed with Gerris. -->
      <tableData>
       -180   0.0016346
       -165   0.0135650
       -150   0.0745610
       -135   0.1331500
       -120   0.1771500
       -105   0.2169500
       -90    0.1910000
       -75    0.2154000
       -60    0.17049
       -45    0.14314
       -30    0.072847
       -20    0.027739
       -10    0.0089855
       0      0.0010200
       10     0.0089855
       20     0.027739
       30     0.072847
       45     0.14314
       60     0.17049
       75     0.2154000
       90     0.1910000
       105    0.2169500
       120    0.1771500
       135    0.1331500
       150    0.0745610
       165    0.0135650
       180    0.0016346
      </tableData>
     </table>
    </product>
   </function>

   <function name="aero/force/D_dr">
    <description>Drag_due_to_rudder_deflection</description>
    <!--
         Formulation based on NACA report 432 "Force measurements on a
         1/40-scale model of the U.S. Airship Akron" by Hugh B. Freeman.

            CD = D / (q * (vol)^(2/3))

    -->
    <product>
     <property>aero/qbar-psf</property>
     <property>aero/constants/volume-ft3_2_3</property>
     <!-- Start CD -->
     <value> 1.0 </value>
     <table>
      <independentVar lookup="row">fcs/rudder-pos-deg</independentVar>
      <!--  Virtual wind-tunnel data computed with Gerris. -->
      <tableData>
       -30  0.020407
       0    0
       30   0.020407
      </tableData>
     </table>
    </product>
   </function>

   <function name="aero/force/D_car">
    <description>Drag_from_car_and_rigging</description>
    <!--
         Formulation based on NACA report 432 "Force measurements on a
         1/40-scale model of the U.S. Airship Akron" by Hugh B. Freeman.

            CD = D / (q * (vol)^(2/3))

    -->
    <product>
     <property>aero/qbar-psf</property>
     <property>aero/constants/volume-ft3_2_3</property>
     <!-- Start CD -->
     <!-- According to [WD:1941:AATM]
          the envelope on a small non-rigid contributes approximately
          35% to the total air resistance.
          I think they mean 'at zero alpha and beta'.
          I assume this would be much lower for the NT07 than a pre-WWII blimp.
     -->
     <value> 0.8 </value>
     <value> 0.0059211 </value>
    </product>
   </function>

  </axis>

  <!-- ================================================== -->
  <axis name="SIDE">

   <function name="aero/force/Y_env_beta">
    <description>Side_force_from_envelope_due_to_beta</description>
    <product>
     <value> -1.0 </value>  <!-- Note the sign! -->
     <property> aero/force/L_env_aoa </property>
     <quotient>
      <property> aero/tmp/wy </property>
      <max>
       <value> 0.00001 </value>
       <property> aero/tmp/h_wy_wz </property>
      </max>
     </quotient>
    </product>
   </function>

   <function name="aero/force/Y_vfin_beta">
    <description>Side_force_from_vertical_fin_due_to_beta</description>
    <!--
         Formulation based on NACA report 432 "Force measurements on a
         1/40-scale model of the U.S. Airship Akron" by Hugh B. Freeman.

            CY = Y / (q * (vol)^(2/3))

    -->
    <product>
     <property>aero/qbar-psf</property>
     <property>aero/constants/volume-ft3_2_3</property>
     <!-- Start CY -->
     <value> -0.5 </value>  <!-- Tweaking needed. Note the sign! -->
     <table>
      <independentVar lookup="row">aero/beta-deg</independentVar>
      <!--  Virtual wind-tunnel data computed with Gerris. -->
      <tableData>
       -180   0.00000
       -165   0.05372
       -150   0.12950
       -135   0.13525
       -120   0.10292
       -105   0.05388
       -90    -0.00000
       -75    -0.05502
       -60    -0.098868
       -45    -0.14402
       -30    -0.12832
       -20    -0.082526
       -10    -0.035474
       0      0.000000
       10     0.035474
       20     0.082526
       30     0.12832
       45     0.14402
       60     0.098868
       75     0.05502
       90     0.00000
       105    -0.05388
       120    -0.10292
       135    -0.13525
       150    -0.12950
       165    -0.05372
       180    0.00000
      </tableData>
     </table>
    </product>
   </function>

   <function name="aero/force/Y_dr">
    <description>Side_force_due_to_rudder</description>
    <!--
         Formulation based on NACA report 432 "Force measurements on a
         1/40-scale model of the U.S. Airship Akron" by Hugh B. Freeman.

            CL = L / (q * (vol)^(2/3))

    -->
    <product>
     <property>aero/qbar-psf</property>
     <property>aero/constants/volume-ft3_2_3</property>
     <!-- Start CL -->
     <value> 0.5 </value> <!-- The rudder is not adjusted yet. -->
     <table>
      <independentVar lookup="row">fcs/rudder-pos-deg</independentVar>
      <!--  Virtual wind-tunnel data computed with Gerris. -->
      <tableData>
       -30  -0.066622
       0    0
       30   0.066622
      </tableData>
     </table>
    </product>
   </function>

  </axis>

  <!-- ================================================== -->
  <axis name="LIFT">

   <function name="aero/force/L_env_alpha">
    <description>Lift_from_envelope_due_to_alpha</description>
    <product>
     <property>aero/force/L_env_aoa</property>
     <quotient>
      <property> aero/tmp/wz </property>
      <max>
       <value> 0.00001 </value>
       <property> aero/tmp/h_wy_wz </property>
      </max>
     </quotient>
    </product>
   </function>

   <function name="aero/force/L_hfin_alpha">
    <description>Lift_from_horizontal_fin_due_to_alpha</description>
    <!--
         Formulation based on NACA report 432 "Force measurements on a
         1/40-scale model of the U.S. Airship Akron" by Hugh B. Freeman.

            CL = L / (q * (vol)^(2/3))

    -->
    <product>
     <property>aero/qbar-psf</property>
     <property>aero/constants/volume-ft3_2_3</property>
     <!-- Start CL -->
     <table>
      <independentVar lookup="row">aero/alpha-deg</independentVar>
      <!--  Virtual wind-tunnel data computed with Gerris. -->
      <tableData>
       -180   0.00000
       -165   0.05372
       -150   0.12950
       -135   0.13525
       -120   0.10292
       -105   0.05388
       -90    -0.00000
       -75    -0.05502
       -60    -0.098868
       -45    -0.14402
       -30    -0.12832
       -20    -0.082526
       -10    -0.035474
       0      0.000000
       10     0.035474
       20     0.082526
       30     0.12832
       45     0.14402
       60     0.098868
       75     0.05502
       90     0.00000
       105    -0.05388
       120    -0.10292
       135    -0.13525
       150    -0.12950
       165    -0.05372
       180    0.00000
      </tableData>
     </table>
    </product>
   </function>

   <function name="aero/force/L_dr">
    <description>Lift_due_to_elevator</description>
    <!--
         Formulation based on NACA report 432 "Force measurements on a
         1/40-scale model of the U.S. Airship Akron" by Hugh B. Freeman.

            CL = L / (q * (vol)^(2/3))

    -->
    <product>
     <property>aero/qbar-psf</property>
     <property>aero/constants/volume-ft3_2_3</property>
     <!-- Start CL -->
     <value> 1.0 </value>
     <table>
      <independentVar lookup="row">fcs/elevator-pos-deg</independentVar>
      <!--  Virtual wind-tunnel data computed with Gerris. -->
      <tableData>
       -30  -0.066622
       0    0
       30   0.066622
      </tableData>
     </table>
    </product>
   </function>

  </axis>

  <!-- Moments =============================================== -->

  <!-- ================================================== -->
  <axis name="ROLL">

   <function name="aero/moment/Clp">  <!-- Totally off! -->
    <description>Roll_moment_due_to_roll_rate_(damping)</description>
    <!-- The current version is just a hack to make the craft stable. -->
    <product>
     <!-- property>aero/qbar-psf</property -->
     <!-- property>aero/bi2vel</property -->
     <property>velocities/p-aero-rad_sec</property>
     <value> -75000.0 </value>
    </product>
   </function>

  </axis>

  <!-- ================================================== -->
  <axis name="PITCH">

   <function name="aero/moment/Cmq"> <!-- Totally off! -->
    <description>Pitch_moment_due_to_pitch_rate_(damping)</description>
    <!-- The current version is just a hack to make the craft stable. -->
    <product>
     <!-- property>aero/qbar-psf</property -->
     <!-- property>aero/ci2vel</property -->
     <property>velocities/q-aero-rad_sec</property>
     <value> -1500000.0 </value>
    </product>
   </function>

   <function name="aero/moment/Cm_env_alpha">
    <description>Pitch_moment_from_envelope_due_to_alpha</description>
    <!--
         Formulation based on NACA report 432 "Force measurements on a
         1/40-scale model of the U.S. Airship Akron" by Hugh B. Freeman.

            Cm = M / (q * vol)

    -->
    <product>
     <property>aero/qbar-psf</property>
     <property>aero/constants/volume-ft3</property>
     <!-- Start Cm -->
     <property>aero/envelope-pitch-moment-tweak-factor</property>
     <table>
      <independentVar lookup="row">aero/alpha-deg</independentVar>
      <!--  Virtual wind-tunnel data computed with Gerris. -->
      <tableData>
       -180   0.00000
       -165   0.38522
       -150   0.66775
       -135   0.77532
       -120   0.67203
       -105   0.40902
       -90    0.01611
       -75   -0.36527
       -60   -0.65462
       -45   -0.76844
       -30   -0.66063
       -20   -0.48736
       -10   -0.26542
       0      0.00000
       10     0.26542
       20     0.48736
       30     0.66063
       45     0.76844
       60     0.65462
       75     0.36527
       90    -0.01611
       105   -0.40902
       120   -0.67203
       135   -0.77532
       150   -0.66775
       165   -0.38522
       180    0.00000
      </tableData>
     </table>
    </product>
   </function>

   <function name="aero/moment/Cm_fin_alpha">
    <description>Pitch_moment_from_horizontal_fin_due_to_alpha</description>
    <!--
         Formulation based on NACA report 432 "Force measurements on a
         1/40-scale model of the U.S. Airship Akron" by Hugh B. Freeman.

            Cm = M / (q * vol)

    -->
    <product>
     <property>aero/qbar-psf</property>
     <property>aero/constants/volume-ft3</property>
     <!-- Start Cm -->
     <table>
      <independentVar lookup="row">aero/alpha-deg</independentVar>
      <!--  Virtual wind-tunnel data computed with Gerris. -->
      <tableData>
       -180   0.00000
       -165   0.06884
       -150   0.18569
       -135   0.23584
       -120   0.25459
       -105   0.27774
       -90    0.23735
       -75    0.27625
       -60    0.24490
       -45    0.25233
       -30    0.18336
       -20    0.10816
       -10    0.045351
       0      0
       10     -0.045351
       20     -0.10816
       30     -0.18336
       45     -0.25233
       60     -0.24490
       75     -0.27625
       90     -0.23735
       105    -0.27774
       120    -0.25459
       135    -0.23584
       150    -0.18569
       165    -0.06884
       180    0.00000
      </tableData>
     </table>
    </product>
   </function>

   <function name="aero/moment/Cmde">
    <description>Pitch_moment_due_to_elevator</description>
    <!--
         Formulation based on NACA report 432 "Force measurements on a
         1/40-scale model of the U.S. Airship Akron" by Hugh B. Freeman.

            Cm = M / (q * vol)

    -->
    <product>
     <property>aero/qbar-psf</property>
     <property>aero/constants/volume-ft3</property>
     <!-- Start Cmdr = -->
     <value> 1.0 </value> <!-- The elevators are not adjusted yet. -->
     <table>
      <independentVar lookup="row">fcs/elevator-pos-deg</independentVar>
      <!--  Virtual wind-tunnel data computed with Gerris. -->
      <tableData>
       -30  0.082789
       0    0
       30   -0.082789
      </tableData>
     </table>
    </product>
   </function>

  </axis>

  <!-- ================================================== -->
  <axis name="YAW">

   <function name="aero/moment/Cnr"> <!-- Totally off! -->
    <description>Yaw_moment_due_to_yaw_rate_(damping)</description>
    <!-- The current version is just a hack to make the craft stable. -->
    <product>
     <!-- property>aero/qbar-psf</property -->
     <!-- property>aero/ai2vel</property -->
     <property>velocities/r-aero-rad_sec</property>
     <value> -1500000.0 </value>
    </product>
   </function>

   <function name="aero/moment/Cndr">
    <description>Yaw_moment_due_to_rudder</description>
    <!--
         Formulation based on NACA report 432 "Force measurements on a
         1/40-scale model of the U.S. Airship Akron" by Hugh B. Freeman.

            Cm = M / (q * vol)

    -->
    <product>
     <property>aero/qbar-psf</property>
     <property>aero/constants/volume-ft3</property>
     <!-- Start Cndr = -->
     <value> 2.5 </value> <!-- The rudder is not adjusted yet. -->
     <table>
      <independentVar lookup="row">fcs/rudder-pos-deg</independentVar>
      <!--  Virtual wind-tunnel data computed with Gerris. -->
      <tableData>
       -30  0.082789
       0    0
       30   -0.082789
      </tableData>
     </table>
    </product>
   </function>

   <function name="aero/moment/Cn_env_beta">
    <description>Yaw_moment_from_envelope_due_to_beta</description>
    <!--
         Formulation based on NACA report 432 "Force measurements on a
         1/40-scale model of the U.S. Airship Akron" by Hugh B. Freeman.

            Cn = M / (q * vol)

    -->
    <product>
     <property>aero/qbar-psf</property>
     <property>aero/constants/volume-ft3</property>
     <!-- Start Cn -->
     <property>aero/envelope-yaw-moment-tweak-factor</property>
     <value> -1.0 </value> <!-- NOTE: sign. -->
     <table>
      <independentVar lookup="row">aero/beta-deg</independentVar>
      <!--  Virtual wind-tunnel data computed with Gerris. -->
      <tableData>
       -180   0.00000
       -165   0.38522
       -150   0.66775
       -135   0.77532
       -120   0.67203
       -105   0.40902
       -90    0.01611
       -75   -0.36527
       -60   -0.65462
       -45   -0.76844
       -30   -0.66063
       -20   -0.48736
       -10   -0.26542
       0      0.00000
       10     0.26542
       20     0.48736
       30     0.66063
       45     0.76844
       60     0.65462
       75     0.36527
       90    -0.01611
       105   -0.40902
       120   -0.67203
       135   -0.77532
       150   -0.66775
       165   -0.38522
       180    0.00000
      </tableData>
     </table>
    </product>
   </function>

   <function name="aero/moment/Cn_fin_beta">
    <description>Yaw_moment_from_vertical_fin_due_to_beta</description>
    <!--
         Formulation based on NACA report 432 "Force measurements on a
         1/40-scale model of the U.S. Airship Akron" by Hugh B. Freeman.

            Cn = M / (q * vol)

    -->
    <product>
     <property>aero/qbar-psf</property>
     <property>aero/constants/volume-ft3</property>
     <!-- Start Cn -->
     <value> -1.0 </value>
     <table>
      <independentVar lookup="row">aero/beta-deg</independentVar>
      <!--  Virtual wind-tunnel data computed with Gerris. -->
      <tableData>
       -180   0.00000
       -165   0.06884
       -150   0.18569
       -135   0.23584
       -120   0.25459
       -105   0.27774
       -90    0.23735
       -75    0.27625
       -60    0.24490
       -45    0.25233
       -30    0.18336
       -20    0.10816
       -10    0.045351
       0      0
       10     -0.045351
       20     -0.10816
       30     -0.18336
       45     -0.25233
       60     -0.24490
       75     -0.27625
       90     -0.23735
       105    -0.27774
       120    -0.25459
       135    -0.23584
       150    -0.18569
       165    -0.06884
       180    0.00000
      </tableData>
     </table>
    </product>
   </function>

  </axis>

 </aerodynamics>

</fdm_config>
